*Heading
** Job name: QIplate_m4 Model name: QIplate_m4
** Generated by: Abaqus/CAE 6.12-2
*Preprint, echo=NO, model=NO, history=NO, contact=NO
**
** PARTS
**
*Part, name=Part-1
*Node
      1,         120.,          32.,           1.
      2,         120.,   30.8571434,           1.
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*Element, type=C3D8R
   1,   88,   89,   31,   30,   59,   60,    2,    1
   2,   89,   90,   32,   31,   60,   61,    3,    2
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*End Part
**
**
** ASSEMBLY
**
*Assembly, name=Assembly
**
*Instance, name=Part-1-1, part=Part-1
*End Instance
**
*Nset, nset=left, instance=Part-1-1, generate
 6033,  6090,     1
*Nset, nset=right, instance=Part-1-1, generate
  1,  58,   1
*Nset, nset=midsurf, instance=Part-1-1
    1,    2,    3,    4,    5,    6
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*End Assembly
**
** BOUNDARY CONDITIONS
**
** Name: fix-left Type: Displacement/Rotation
*Boundary
left, 1, 1
left, 2, 2
** Name: fix-right Type: Displacement/Rotation
*Boundary
right, 2, 2
** Name: sym Type: Displacement/Rotation
*Boundary
midsurf, 3, 3
** ----------------------------------------------------------------
**
** STEP: tension
**
*Step, name=tension, inc=30000
*Static
0.01, 3., 1e-05, 0.01
**
** BOUNDARY CONDITIONS
**
** Name: pull Type: Velocity/Angular velocity
*Boundary, type=VELOCITY
right, 1, 1, 1.
**
** CONTROLS
**
*Controls, reset
*Controls, parameters=time incrementation
800, 1000, , 1500, 1200, 50, , 125, , ,
*Controls, parameters=field, field=displacement
0.01, , , , 0.05, , ,
*Controls, parameters=field, field=hydrostatic fluid pressure
0.01, , , , 0.05, , ,
*Controls, parameters=field, field=rotation
0.01, , , , 0.05, , ,
*Controls, parameters=field, field=electrical potential
0.01, , , , 0.05, , ,
**
** OUTPUT REQUESTS
**
*Restart, write, frequency=0
**
** FIELD OUTPUT: F-Output-1
**
*Output, field
*Node Output
RF, U
*Output, history, frequency=0
*End Step
